DAU := 27*10^6
MAU := 400*10^6
all_user_to_MAU := 3
# Расчет RPS
# Пользователи
all_users := all_user_to_MAU*MAU = 1200000000
RPS_user_create := all_users/((2025 - 2009)*365 day) = 2.37823 1/s
RPS_user_read := DAU/day = 312.5 1/s
RPS_user := RPS_user_create + RPS_user_read = 314.878 1/s
# Вопросы
questions_per_day_read_by_user := 10
RPS_question_create := 7000/day = 0.0810185 1/s
RPS_question_read := DAU*questions_per_day_read_by_user/day = 3125 1/s
# Ответы
answer_per_question := 5
RPS_answer_create := RPS_question_create*answer_per_question = 0.405093 1/s
RPS_answer_read := answer_per_question*RPS_question_read = 15625 1/s
# Посты
RPS_post_create := RPS_question_create = 0.0810185 1/s
RPS_post_read := RPS_question_read = 3125 1/s
# Комментарии
comments_per_post_feed := 142.1
comments_per_post_profile := 1.07
comments_per_answer := 17.4
comments_on_read := 10
RPS_comment_create := comments_per_post_feed*RPS_post_create + comments_per_answer*RPS_answer_create = 18.5613 1/s
RPS_comment_read := comments_on_read*RPS_post_read + comments_on_read*RPS_answer_read = 187500 1/s
# Оценки
votes_per_post_feed := 1823
votes_per_post_profile := 17.9
votes_per_answer := 83.7
RPS_votes_create := votes_per_post_feed*RPS_post_create + votes_per_answer*RPS_answer_create = 181.603 1/s
RPS_votes_read := RPS_post_read + RPS_answer_read = 18750 1/s
# Сообщества
spaces_per_user := 0.001
all_spaces := spaces_per_user*all_users = 1200000
RPS_space_create := RPS_user_create*spaces_per_user = 0.00237823 1/s
RPS_space_read := RPS_post_read = 3125 1/s
# Расчет трафика
bit := 1
B := 8 bit
Kbit := 1024 bit
KB := 1024 B
Mbit := 1024 Kbit
MB := 1024 KB
GB := 1024 MB
Gbit := 1024 Mbit
TB := 1024 GB
PB := 1024 TB
symbol_size := 4 B
image_size := 1 MB
# Пользователи
username_symbols := 30
user_size := username_symbols*symbol_size + image_size = 1.00011 MB
user_traffic_create := user_size*RPS_user_create = 19.0281 Mbit/s
user_traffic_read := user_size*RPS_user_read = 2.44169 Gbit/s
user_traffic := user_traffic_create + user_traffic_read = 2.46027 Gbit/s
user_traffic = 25.9481 TB/day
2*user_traffic = 4.92054 Gbit/s
# Вопросы
question_symbols := 120
question_size := question_symbols*symbol_size = 480 B
question_traffic_create := question_size*RPS_question_create = 38.8889 B/s
question_traffic_read := question_size*RPS_question_read = 1.43051 MB/s
question_traffic := question_traffic_create + question_traffic_read = 1.43055 MB/s
question_traffic = 11.4444 Mbit/s
question_traffic = 120.703 GB/day
# Ответы
answer_symbols := 918
answer_images := 0.6
answer_size := answer_symbols*symbol_size + answer_images*image_size = 617.986 KB
answer_traffic_create := answer_size*RPS_answer_create = 250.342 KB/s
answer_traffic_read := answer_size*RPS_answer_read = 9.20871 GB/s
answer_traffic := answer_traffic_create + answer_traffic_read = 9.20895 GB/s
answer_traffic = 73.6716 Gbit/s
answer_traffic = 777.005 TB/day
# Посты
post_symbols := 968
post_images := 1.8
post_size := post_symbols*symbol_size + post_images*image_size = 1.80369 MB
post_traffic_create := post_size*RPS_post_create = 149.64 KB/s
post_traffic_read := post_size*RPS_post_read = 5.50443 GB/s
post_traffic := post_traffic_create + post_traffic_read = 5.50458 GB/s
post_traffic = 44.0366 Gbit/s
post_traffic = 464.449 TB/day
# Оценки
vote_size_create := 512 B
vote_size_read := 20 B
vote_traffic_create := vote_size_create*RPS_votes_create = 90.8015 KB/s
vote_traffic_read := vote_size_read*RPS_votes_read = 366.211 KB/s
vote_traffic := vote_traffic_create + vote_traffic_read = 457.012 KB/s
vote_traffic = 3.57041 Mbit/s
vote_traffic = 37.6567 GB/day
# Комментарии
comment_symbols := 87
comment_size := symbol_size*comment_symbols = 348 B
comment_traffic_create := comment_size*RPS_comment_create = 6.30796 KB/s
comment_traffic_read := comment_size*RPS_comment_read = 62.2272 MB/s
comment_traffic := comment_traffic_create + comment_traffic_read = 62.2334 MB/s
comment_traffic = 497.867 Mbit/s
comment_traffic = 5.12787 TB/day
# Сообщества
space_name_length := 30
space_decription_length := 60
space_size := symbol_size*(space_name_length + space_decription_length) + image_size = 1.00034 MB
space_traffic_create := space_size*RPS_space_create = 2.43615 KB/s
space_traffic_read := space_size*RPS_space_read = 3.05281 GB/s
space_traffic := space_traffic_create + space_traffic_read = 24.4225 Gbit/s
space_traffic = 257.581 TB/day
2*space_traffic = 48.8449 Gbit/s
# Суммарный
traffic := user_traffic + question_traffic + answer_traffic + post_traffic + vote_traffic + comment_traffic + space_traffic = 145.092 Gbit/s
traffic = 1.4944 PB/day
peak_traffic := 2*traffic = 290.184 Gbit/s
# Расчет хранилищ
DB_grow_time := 10*365 day
# Пользователи
user_DB_grow := user_traffic_create = 71.5338 TB/(365 day)
user_DB_size := user_DB_grow*DB_grow_time = 715.338 TB
# Вопросы
question_DB_grow := question_traffic_create = 0.0011154 TB/(365 day)
question_DB_size := question_DB_grow*DB_grow_time = 0.011154 TB
# Ответы
answer_DB_grow := answer_traffic_create = 7.35258 TB/(365 day)
answer_DB_size := answer_DB_grow*DB_grow_time = 73.5258 TB
# Посты
post_DB_grow := post_traffic_create = 4.39495 TB/(365 day)
post_DB_size := post_DB_grow*DB_grow_time = 43.9495 TB
# Комментарии
comment_DB_grow := comment_traffic_create = 0.185266 TB/(365 day)
comment_DB_size := comment_DB_grow*DB_grow_time = 1.85266 TB
# Оценки
int_size := 4 B
vote_size_DB := int_size*4 = 16 B
vote_DB_grow := vote_size_DB*RPS_votes_create = 0.0833393 TB/(365 day)
vote_DB_size := vote_DB_grow*DB_grow_time = 0.833393 TB
# Сообщества
space_DB_grow := space_traffic_create = 0.0715501 TB/(365*day)
space_DB_size := all_spaces*space_size = 1.1448 TB  # disabled
space_DB_size := space_traffic_create*DB_grow_time = 0.715501 TB
space_DB_grow := space_DB_size/DB_grow_time = 117.228 GB/(365*day)  # disabled
# Суммарно
DB_grow := user_DB_grow + question_DB_grow + answer_DB_grow + post_DB_grow + comment_DB_grow + vote_DB_grow + space_DB_grow = 83.6226 TB/(365 day)
DB_size := DB_grow*DB_grow_time = 836.226 TB
# Балансировка нагрузки
USA := 0.37
India := 0.25
Europe := 0.176
SEA := 0.06  # - Юго-восточная Азия
UnitedKingdom := 0.056
MENA := 0.05  # - Ближний Восток и Северная Африка
Canada := 0.037
ANZ := 0.027  # - Австралия
Japan := 0.017
Mexico := 0.0087
Brazil := 0.0065
# Доля пользователей по частям света
Северная_Америка := USA + Canada + Mexico = 0.4157
Азия := India + SEA + MENA + Japan = 0.377
Еврора := Europe + UnitedKingdom = 0.232
Австралия := ANZ = 0.027
Южная_Америка := Brazil = 0.0065
# Количесво ДЦ:
data_centers := 5
# Трафик на 1 ДЦ:
traffic_per_DC := peak_traffic/data_centers = 58.0367 Gbit/s
